OpenVSP model (file version 5), 9 components.
Geometry view with OpenVSP parameter names; values to 6 digits, angles in degrees, lengths in the model's unit.
Overall bounding box: X_Min=0 X_Len=34.9 Y_Min=-20.9246 Y_Len=41.8493 Z_Min=-1.90335 Z_Len=11.2534

Fuselage "Fuselage"
  location (X Y Z) 2 0 1.5, rotation 0 0 0
  bounding box size 32.9 4.31489 5.20335
  mass: Density=1 Shell_Flag=1 Mass_Area=2 Mass_Prior=0
  Design: Length=32.9
  cross sections:
    n  XLocPercent  YLocPercent  ZLocPercent  shape
    0  0            0            -0.0440729   circle Circle_Diameter=1.5
    1  0.221884     0            -0.0486322   super ellipse Super_Height=3.4 Super_M=2 Super_MaxWidthLoc=0 Super_N=2 Super_Width=4.1
    2  0.358002     0            -0.0243161   super ellipse Super_Height=5.2 Super_M=3 Super_MaxWidthLoc=0 Super_N=2 Super_Width=4.3
    3  0.485        0            -0.0243161   as above
    4  0.75         0            -0.00303951  super ellipse Super_Height=3.1 Super_M=3 Super_MaxWidthLoc=0 Super_N=2 Super_Width=2.7
    5  0.95         0            0.0273556    super ellipse Super_Height=0.9 Super_M=3 Super_MaxWidthLoc=0 Super_N=2 Super_Width=0.8
    6  1            0            0.0334347    point

Wing "VStab", child of "Fuselage"
  location (X Y Z) 19 0 2.8, rotation 90 0 0; relative location 17 0 1.3, rotation 90 0 0
  bounding box size 15.5666 0.720259 6.55
  mass: Density=2 Shell_Flag=0 Mass_Area=1 Mass_Prior=0
  totals: TotalSpan=6.55 TotalProjectedSpan=6.55 TotalChord=6.89948 TotalArea=33.1789 TotalAR=1.29307
  root: chord 13.1979, twist 0, NACA 63-series A=1 IdealCl=0 ThickChord=0.05
  sections:
    n  Span  Root_Chord  Tip_Chord  Area     Sweep  Sweep_Location  Dihedral  Twist  Twist_Location  tip airfoil
    1  1.05  13.1979     6          10.0789  82     0               0         0      0.25            NACA 4-series Camber=0 CamberLoc=0.2 ThickChord=0.12
    2  5.5   6           2.4        23.1     46     0               0         0      0.25            NACA 4-series Camber=0 CamberLoc=0.2 ThickChord=0.15
  SS_Control "Rudder": UStart=0.5 UEnd=0.75 Length_C_Start=0.5 Length_C_End=0.5 Length_Start=3 Length_End=1.2 LE_Flag=0 Surf_Type=2

Fuselage "PropSpinner", child of "Fuselage"
  location (X Y Z) 0 0.08 0, rotation 0 -2 -2; relative location -2 0.08 -1.5, rotation 0 -2 -2
  bounding box size 2.03703 1.59903 1.59956
  mass: Density=4 Shell_Flag=0 Mass_Area=1 Mass_Prior=0
  Design: Length=2
  cross sections:
    n  XLocPercent  YLocPercent  ZLocPercent  shape
    0  0            0            0            point
    1  1            0            0            circle Circle_Diameter=1.6

Wing "Wings", child of "Fuselage"
  location (X Y Z) 12.4 0 -1.45, rotation 0 0 0; relative location 10.4 0 -2.95, rotation 0 0 0
  symmetric about XZ
  bounding box size 5.99819 41.8493 4.84686
  mass: Density=4 Shell_Flag=0 Mass_Area=1 Mass_Prior=0
  totals: TotalSpan=45 TotalProjectedSpan=41.8055 TotalChord=3.18125 TotalArea=202.11 TotalAR=8.64729
  root: chord 6, twist 2, NACA 4-series Camber=0.04 CamberLoc=0.43 ThickChord=0.16
  sections:
    n  Span  Root_Chord  Tip_Chord  Area    Sweep  Sweep_Location  Dihedral  Twist  Twist_Location  tip airfoil
    1  19.7  6           3.7        95.545  1.3    0               6.5       0      0.25            as above
    2  0.4   3.7         3.25       1.39    45     0               25        0      0.25            NACA 4-series Camber=0.02 CamberLoc=0.43 ThickChord=0.133
    3  0.4   3.25        2.6        1.17    60     0               45        0      0.25            NACA 4-series Camber=0 CamberLoc=0.43 ThickChord=0.133
    4  2     2.6         0.35       2.95    55     0               70        0      0.25            as above
  SS_Control "Flaps": UStart=0.188 UEnd=0.295 Length_C_Start=0.3 Length_C_End=0.3 Length_Start=1.7116 Length_End=1.26853 LE_Flag=0 Surf_Type=2
  SS_Control "Ailerons": UStart=0.295 UEnd=0.3333 Length_C_Start=0.25 Length_C_End=0.25 Length_Start=1.05711 Length_End=0.925115 LE_Flag=0 Surf_Type=2

Pod "Pod", child of "Wings"
  location (X Y Z) 11.4 -15 0.4, rotation 0 0 0; relative location -1 -15 1.85, rotation 0 0 0
  bounding box size 4 1.14286 1.14286
  mass: Density=2 Shell_Flag=0 Mass_Area=1 Mass_Prior=0
  Design: FineRatio=7 Length=4

Blank "ARP", child of "Wings"
  location (X Y Z) 13.65 0 -0.25, rotation 0 0 0; relative location 1.25 0 1.2, rotation 0 0 0

Wing "HStab", child of "Fuselage"
  location (X Y Z) 31.2 0 2.7, rotation 0 0 0; relative location 29.2 0 1.2, rotation 0 0 0
  symmetric about XZ
  bounding box size 3.64988 15.9276 1.32317
  mass: Density=2 Shell_Flag=0 Mass_Area=1 Mass_Prior=0
  totals: TotalSpan=16 TotalProjectedSpan=15.8971 TotalChord=3.05 TotalArea=48.8 TotalAR=5.17868
  root: chord 3.65, twist 0.5, NACA 4-series Camber=0 CamberLoc=0.2 ThickChord=0.1
  sections:
    n  Span  Root_Chord  Tip_Chord  Area  Sweep  Sweep_Location  Dihedral  Twist  Twist_Location  tip airfoil
    1  8     3.65        2.45       24.4  2.3    0               6.5       0      0.25            NACA 63-series A=1 IdealCl=0.4 ThickChord=0.15
  SS_Control "Elevator": UStart=0.25 UEnd=0.75 Length_C_Start=0.356164 Length_C_End=0.387755 Length_Start=1.3 Length_End=0.95 LE_Flag=0 Surf_Type=2

Wing "VFin", child of "Fuselage"
  location (X Y Z) 24.7 0 -0.5, rotation -90 0 -18; relative location 22.7 0 -2, rotation -90 0 -18
  bounding box size 4.56507 0.384462 2.02836
  mass: Density=2 Shell_Flag=0 Mass_Area=1 Mass_Prior=0
  totals: TotalSpan=0.65 TotalProjectedSpan=0.65 TotalChord=4.4 TotalArea=2.86 TotalAR=0.147727
  root: chord 4.8, twist 0, NACA 4-series Camber=0 CamberLoc=0.2 ThickChord=0.08
  sections:
    n  Span  Root_Chord  Tip_Chord  Area  Sweep  Sweep_Location  Dihedral  Twist  Twist_Location  tip airfoil
    1  0.65  4.8         4          2.86  20     0               0         0      0.25            as above

Mesh "MeshGeom"
  location (X Y Z) 0 0 0, rotation 0 0 0

VSPAERO settings: Sref=193.75 bref=42.0833 cref=4.95 Xcg=13.65 Ycg=0 Zcg=-0.25 AlphaStart=-10 AlphaEnd=20 AlphaNpts=7 BetaStart=-30 BetaEnd=30 BetaNpts=5 MachStart=0.2 MachEnd=0 MachNpts=1 ReCref=1e+07 Vinf=100 Rho=0.002377
  control group "Ailerons": DeflectionAngle=20
  control group "Flaps": DeflectionAngle=38
  control group "Elevator": DeflectionAngle=20
  control group "Rudder": DeflectionAngle=30
