<?xml version="1.0" encoding="UTF-8"?>
<turboprop_engine name="PT6A-66D">
	<milthrust unit="LBS">1904</milthrust>
	<idlen1>60</idlen1>
	<maxn1>100</maxn1>
	<maxpower unit="HP">850</maxpower>
	<psfc unit="LBS/HR/HP">0.649</psfc>
	<n1idle_max_delay>1</n1idle_max_delay>
	<maxstartingtime>20</maxstartingtime>
	<startern1>20</startern1>
	<itt_delay>0.05</itt_delay>
	<betarangeend>64</betarangeend>
	<reversemaxpower>60</reversemaxpower>

	<function name="EnginePowerVC">
		<table>
			<description>Engine power, function of airspeed and pressure </description>
			<independentVar lookup="row">atmosphere/P-psf</independentVar>
			<independentVar lookup="column">velocities/ve-kts</independentVar>
			<tableData>
						0		50		100		150		200		250		300		350
				503		0.357	0.380	0.400	0.425	0.457	0.486	0.517	0.550
				1048	0.586	0.589	0.600	0.621	0.650	0.686	0.724	0.764
				1328	0.707	0.721	0.731	0.757	0.786	0.821	0.858	0.896
				1496	0.779	0.786	0.808	0.821	0.857	0.900	0.945	0.993
				1684	0.850	0.857	0.874	0.900	0.943	0.979	1.016	1.055
				1896	0.914	0.929	0.946	0.971	1		1.057	1.117	1.181
				2135	1		1.011	1.029	1.043	1.083	1.150	1.221	1.297
				2213	1.029	1.043	1.057	1.079	1.114	1.171	1.231	1.294
			</tableData>
		</table>
	</function>

	<table name="EnginePowerRPM_N1" type="internal">
		<description>Engine Power, function of RPM and N1</description>
		<tableData>
					0	5	60		86		94		95		96		97		98		99		100
			0		0	0.6	0.6		0.6		0.6		0.6		0.6		0.6		0.6		0.6		0.6
			75.1	0	0.6	40		228.8	400.4	434.7	480.5	526.2	572.0	606.3	709.3
			112.4	0	0.6	34.3	263.2	457.6	491.9	537.7	577.7	629.2	675.0	777.9
			149.9	0	0.6	5.7		274.6	503.4	543.4	583.4	629.2	680.7	720.7	823.6
			187.4	0	0.1	0.1		257.4	514.8	566.3	600.6	646.3	697.8	743.6	852.3
			206.2	0	0.1	0.1		234.5	503.4	549.1	589.1	640.6	692.2	737.9	850.0
		</tableData>
	</table>

	<table name="ITT_N1" type="internal">
		<description>ITT [deg C] depending on N1 and engine run (0=off / 1=running)</description>
		<tableData>
				0	1
			0	0	0
			15	0	0
			60	0	0
			96	0	0
			100	0	0
		</tableData>
	</table>

	<table name="CombustionEfficiency_N1" type="internal">
		<description>Dependency of fuel efficiency coefficient on N1 (and RPM)</description>
		<tableData>
			90		0.1221
			91.2	0.2834
			92.2	0.5336
			93.4	0.7188
			94.1	0.7741
			95.2	0.8471
			96.5	0.9001
			100		1
		</tableData>
	</table>
</turboprop_engine>
