<?xml version="1.0" encoding="UTF-8"?>
<aerodynamics>
	<property value="1.8">metrics/Ss-sqft</property>
	<property value="0.2">metrics/spoiler-span-norm</property>
	<property value="13">metrics/spoiler-arm-ft</property>

	<alphalimits unit="DEG">
		<min>-5</min>
		<max>16</max>
	</alphalimits>

	<hysteresis_limits unit="DEG">
		<min>5</min>
		<max>15</max>
	</hysteresis_limits>

	<function name="aero/function/kCLge">
		<description>Change in lift due to ground effect</description>
		<table>
			<independentVar>aero/h_b-mac-ft</independentVar>
			<tableData>
				0.0000	1.2030
				0.1000	1.1270
				0.1500	1.0900
				0.2000	1.0730
				0.3000	1.0460
				0.4000	1.0550
				0.5000	1.0190
				0.6000	1.0130
				0.7000	1.0080
				0.8000	1.0060
				0.9000	1.0030
				1.0000	1.0020
				1.1000	1.0000
			</tableData>
		</table>
	</function>

	<function name="aero/function/kCLdlsp">
		<description>Change in lift due to left spoiler deflection</description>
		<difference>
			<v>1</v>
			<product>
				<p>fcs/left-spoiler-pos-norm</p>
				<p>metrics/spoiler-span-norm</p>
			</product>
		</difference>
	</function>

	<function name="aero/function/kCLdrsp">
		<description>Change in lift due to right spoiler deflection</description>
		<difference>
			<v>1</v>
			<product>
				<p>fcs/right-spoiler-pos-norm</p>
				<p>metrics/spoiler-span-norm</p>
			</product>
		</difference>
	</function>

	<function name="aero/coefficient/CLa">
		<description>Lift coefficient due to alpha</description>
		<product>
			<property>aero/function/kCLge</property>
			<table>
				<independentVar lookup="row">aero/alpha-deg</independentVar>
				<independentVar lookup="column">aero/beta-deg</independentVar>
				<independentVar lookup="table">fcs/flap-pos-deg</independentVar>
				<tableData breakPoint="0">
							-30.0		-15.0		0.0			15.0		30.0
					-10.0	-0.451058	-0.488663	-0.548194	-0.488663	-0.451058
					-5.0		-0.081094	-0.018490	-0.045996	-0.018490	-0.081094
					0.0		0.292005	0.454376	0.461896	0.454376	0.292005
					5.0		0.694143	0.929585	0.970956	0.929585	0.694143
					10.0	1.041774	1.256890	1.263193	1.256890	1.041774
					15.0	1.198788	1.316674	1.325407	1.316674	1.198788
					20.0	1.222904	1.179631	1.106869	1.179631	1.222904
				</tableData>
				<tableData breakPoint="38">
							-30.0		-15.0		0.0			15.0		30.0
					-10.0	0.286937	0.439763	0.445732	0.441228	0.290091
					-5.0		0.644846	0.883583	0.926737	0.885901	0.647452
					0.0		0.943614	1.260832	1.326697	1.264116	0.948657
					5.0		1.212390	1.472598	1.533299	1.477424	1.217868
					10.0	1.298602	1.451107	1.439036	1.455468	1.301342
					15.0	1.266241	1.145969	1.020497	1.145977	1.271199
					20.0	1.098437	0.704131	0.402029	0.707315	1.105614
				</tableData>
			</table>
		</product>
	</function>

	<function name="aero/coefficient/CLq">
		<description>Lift coefficient due to pitch rate</description>
		<table>
			<independentVar lookup="row">aero/alpha-deg</independentVar>
			<independentVar lookup="column">aero/beta-deg</independentVar>
			<independentVar lookup="table">fcs/flap-pos-deg</independentVar>
			<tableData breakPoint="0">
						-30.0		-15.0		0.0				15.0		30.0
				-10.0	12.234718	13.336921	13.852953	13.336921	12.234718
				-5.0		12.262259	13.243210	13.833519	13.243210	12.262259
				0.0		12.534601	13.466544	13.993027	13.466544	12.534601
				5.0		12.085740	13.086656	14.338225	13.086656	12.085740
				10.0	10.510961	7.484351	9.407375	7.484351	10.510961
				15.0	5.548462	2.811321	3.705083	2.811321	5.548462
				20.0	2.990919	-5.526586	-5.103978	-5.526586	2.990919
			</tableData>
			<tableData breakPoint="38">
						-30.0		-15.0		0.0			15.0		30.0
				-10.0	11.819039	12.811943	13.489523	12.811943	11.819039
				-5.0		11.623637	12.952564	13.831443	12.952564	11.623637
				0.0		11.563228	12.032713	12.878393	12.032713	11.563228
				5.0		10.606579	10.635482	10.904073	10.635482	10.606579
				10.0	10.874570	7.668459	8.420053	7.668459	10.874570
				15.0	7.860332	2.015035	0.975325	2.015035	7.860332
				20.0	1.181750	-9.355452	-0.992737	-9.355452	1.181750
			</tableData>
		</table>
	</function>

	<function name="aero/coefficient/CLadot">
		<description>Lift coefficient due to alpha rate</description>
		<v>1.6033</v>
	</function>

	<function name="aero/function/qbar-propwash-psf">
		<description> q bar due to the propeller induced velocity </description>
		<product>
			<property>propulsion/engine/prop-induced-velocity_fps</property>
			<property>propulsion/engine/prop-induced-velocity_fps</property>
			<property>atmosphere/rho-slugs_ft3</property>
			<value>0.5</value>
		</product>
	</function>

	<function name="aero/function/velocity-induced-fps">
		<description>Velocity including the propulsion induced velocity.</description>
		<sum>
			<property>velocities/u-fps</property>
			<property>propulsion/engine/prop-induced-velocity_fps</property>
		</sum>
	</function>

	<function name="aero/function/qbar-induced-psf">
		<description>qbar including the propulsion induced velocity.</description>
		<product>
			<property>aero/function/velocity-induced-fps</property>
			<property>aero/function/velocity-induced-fps</property>
			<property>atmosphere/rho-slugs_ft3</property>
			<value>0.5</value>
		</product>
	</function>


	<axis name="LIFT">
		<!--<function name="aero/force/Lift_propwash">
			<description>Delta lift due to propeller induced velocity</description>
			<product>
				<property>propulsion/engine[0]/thrust-coefficient</property>
				<property>aero/qbar-psf</property>
				<property>metrics/Sw-sqft</property>
				<table>
					<independentVar lookup="row">aero/alpha-rad</independentVar>
					<independentVar lookup="column">fcs/flap-pos-deg</independentVar>
					<tableData>
								0		60
						-4.67	0		0
						0		0.622	1.658
						0.13	3.396	9.058
						0.27	0		0
					</tableData>
				</table>
			</product>
		</function>-->

		<function name="aero/force/Lift_alpha_left_wing">
			<description>Lift due to alpha, left wing</description>
			<product>
				<p>aero/qbar-psf</p>
				<p>metrics/Sw-sqft</p>
				<v>0.5</v>
				<p>aero/coefficient/CLa</p>
				<p>aero/function/kCLdlsp</p>
			</product>
		</function>

		<function name="aero/force/Lift_alpha_right_wing">
			<description>Lift due to alpha, right wing</description>
			<product>
				<p>aero/qbar-psf</p>
				<p>metrics/Sw-sqft</p>
				<v>0.5</v>
				<p>aero/coefficient/CLa</p>
				<p>aero/function/kCLdrsp</p>
			</product>
		</function>

		<function name="aero/force/Lift_pitch_rate_left_wing">
			<description>Lift due to pitch rate, left wing</description>
			<product>
				<p>aero/qbar-psf</p>
				<p>metrics/Sw-sqft</p>
				<v>0.5</v>
				<p>velocities/q-aero-rad_sec</p>
				<p>aero/ci2vel</p>
				<p>aero/coefficient/CLq</p>
				<p>aero/function/kCLdlsp</p>
			</product>
		</function>

		<function name="aero/force/Lift_pitch_rate_right_wing">
			<description>Lift due to pitch rate, right wing</description>
			<product>
				<p>aero/qbar-psf</p>
				<p>metrics/Sw-sqft</p>
				<v>0.5</v>
				<p>velocities/q-aero-rad_sec</p>
				<p>aero/ci2vel</p>
				<p>aero/coefficient/CLq</p>
				<p>aero/function/kCLdrsp</p>
			</product>
		</function>

		<function name="aero/force/Lift_alpha_rate_left_wing">
			<description>Lift due to alpha rate, left wing</description>
			<product>
				<p>aero/qbar-psf</p>
				<p>metrics/Sw-sqft</p>
				<v>0.5</v>
				<p>aero/alphadot-rad_sec</p>
				<p>aero/ci2vel</p>
				<p>aero/coefficient/CLadot</p>
				<p>aero/function/kCLdlsp</p>
			</product>
		</function>

		<function name="aero/force/Lift_alpha_rate_right_wing">
			<description>Lift due to alpha rate, right wing</description>
			<product>
				<p>aero/qbar-psf</p>
				<p>metrics/Sw-sqft</p>
				<v>0.5</v>
				<p>aero/alphadot-rad_sec</p>
				<p>aero/ci2vel</p>
				<p>aero/coefficient/CLadot</p>
				<p>aero/function/kCLdrsp</p>
			</product>
		</function>

		<function name="aero/force/Lift_elevator">
			<description>Lift due to Elevator Deflection</description>
			<product>
				<property>aero/qbar-psf</property>
				<property>metrics/Sw-sqft</property>
				<property>fcs/elevator-pos-rad</property>
				<value>0.2914319</value>
			</product>
		</function>

		<function name="aero/force/Lift_left_spoiler">
			<description>Delta lift due to left spoiler deflection</description>
			<product>
				<p>aero/qbar-psf</p>
				<p>metrics/Ss-sqft</p>
				<sin>
					<product>
						<p>fcs/left-spoiler-pos-rad</p>
						<v>2</v>
					</product>
				</sin>
				<v>0.5</v>
				<v>1.28</v>
				<v>-1</v>
			</product>
		</function>

		<function name="aero/force/Lift_right_spoiler">
			<description>Delta lift due to right spoiler deflection</description>
			<product>
				<p>aero/qbar-psf</p>
				<p>metrics/Ss-sqft</p>
				<sin>
					<product>
						<p>fcs/right-spoiler-pos-rad</p>
						<v>2</v>
					</product>
				</sin>
				<v>0.5</v>
				<v>1.28</v>
				<v>-1</v>
			</product>
		</function>
	</axis>

	<axis name="DRAG">
		<function name="aero/force/Drag_base">
			<description>Drag due to alpha and beta</description>
			<product>
				<property>aero/qbar-psf</property>
				<property>metrics/Sw-sqft</property>
				<table>
					<independentVar lookup="row">aero/alpha-deg</independentVar>
					<independentVar lookup="column">aero/beta-deg</independentVar>
					<independentVar lookup="table">fcs/flap-pos-deg</independentVar>
					<tableData breakPoint="0">
								-30.0		-15.0		0.0			15.0		30.0
						-10.0	0.015859	0.015779	0.015838	0.015779	0.015859
						-5.0		0.015245	0.014954	0.014742	0.014954	0.015245
						0.0		0.016099	0.016326	0.016225	0.016326	0.016099
						5.0		0.018281	0.019810	0.020136	0.019810	0.018281
						10.0	0.021497	0.023026	0.022903	0.023026	0.021497
						15.0	0.022529	0.022921	0.022738	0.022921	0.022529
						20.0	0.021614	0.020558	0.019505	0.020558	0.021614
					</tableData>
					<tableData breakPoint="38">
								-30.0		-15.0		0.0			15.0		30.0
						-10.0	0.018012	0.019012	0.019549	0.019024	0.018026
						-5.0		0.020480	0.022861	0.023808	0.022877	0.020497
						0.0		0.023403	0.026914	0.028193	0.026943	0.023446
						5.0		0.025457	0.028730	0.029694	0.028780	0.025473
						10.0	0.026276	0.026555	0.026108	0.026598	0.026271
						15.0	0.024055	0.021079	0.019413	0.021073	0.024134
						20.0	0.020631	0.016772	0.015589	0.016795	0.020692
					</tableData>
				</table>
			</product>
		</function>

		<function name="aero/force/Drag_induced">
			<description>Induced drag</description>
			<product>
				<property>aero/qbar-psf</property>
				<property>metrics/Sw-sqft</property>
				<table>
					<independentVar lookup="row">aero/alpha-deg</independentVar>
					<independentVar lookup="column">aero/beta-deg</independentVar>
					<independentVar lookup="table">fcs/flap-pos-deg</independentVar>
					<tableData breakPoint="0">
								-30.0		-15.0		0.0			15.0		30.0
						-10.0	0.065459	0.026242	0.014205	0.026242	0.065459
						-5.0		0.049217	0.012987	0.001075	0.012987	0.049217
						0.0		0.045020	0.018180	0.006707	0.018180	0.045020
						5.0		0.091665	0.042514	0.031631	0.042514	0.091665
						10.0	0.084494	0.118161	0.130015	0.118161	0.084494
						15.0	0.177822	0.275946	0.301651	0.275946	0.177822
						20.0	0.318542	0.475241	0.552987	0.475241	0.318542
					</tableData>
					<tableData breakPoint="38">
								-30.0		-15.0		0.0			15.0		30.0
						-10.0	0.079849	0.046858	0.037946	0.046858	0.079849
						-5.0		0.082820	0.060164	0.053033	0.060164	0.082820
						0.0		0.125246	0.107804	0.107068	0.107804	0.125246
						5.0		0.163541	0.209957	0.224547	0.209957	0.163541
						10.0	0.251680	0.383695	0.429983	0.383695	0.251680
						15.0	0.404247	0.636388	0.727397	0.636388	0.404247
						20.0	0.588715	0.905792	1.070895	0.905792	0.588715
					</tableData>
				</table>
			</product>
		</function>

		<function name="aero/force/Drag_pitch_rate">
			<description>Drag due to pitch rate</description>
			<product>
				<property>aero/qbar-psf</property>
				<property>metrics/Sw-sqft</property>
				<property>velocities/q-aero-rad_sec</property>
				<property>aero/ci2vel</property>
				<table>
					<independentVar lookup="row">aero/alpha-deg</independentVar>
					<independentVar lookup="column">aero/beta-deg</independentVar>
					<independentVar lookup="table">fcs/flap-pos-deg</independentVar>
					<tableData breakPoint="0">
								-30.0		-15.0		0.0			15.0		30.0
						-10.0	-1.633867	-1.326206	-1.093391	-1.326206	-1.633867
						-5.0		-1.417457	-1.187347	-0.967747	-1.187347	-1.417457
						0.0		-1.170111	-1.082280	-0.829581	-1.082280	-1.170111
						5.0		-2.439696	-0.797450	-0.655560	-0.797450	-2.439696
						10.0	-0.183629	0.981598	0.899074	0.981598	-0.183629
						15.0	2.501726	2.712731	2.957932	2.712731	2.501726
						20.0	3.189312	5.984588	5.570085	5.984588	3.189312
					</tableData>
					<tableData breakPoint="38">
								-30.0		-15.0		0.0			15.0		30.0
						-10.0	-1.269945	-0.743371	-0.427470	-0.743371	-1.269945
						-5.0		-1.111418	-0.596825	-0.315159	-0.596825	-1.111418
						0.0		-1.275235	0.021248	0.067137	-0.021248	-1.275235
						5.0		-1.572944	0.531004	0.776954	0.531004	-1.572944
						10.0	0.615462	1.629962	1.743524	1.629962	0.615462
						15.0	1.445911	3.425634	3.141133	3.425634	1.445911
						20.0	4.333752	7.434222	5.415263	7.434222	4.333752
					</tableData>
				</table>
			</product>
		</function>

		<function name="aero/force/Drag_aileron">
			<description>Drag due to aileron deflection</description>
			<product>
				<property>aero/qbar-psf</property>
				<property>metrics/Sw-sqft</property>
				<abs>
					<property>fcs/aileron-pos-rad</property>
				</abs>
				<value>0.0467287</value>
			</product>
		</function>

		<function name="aero/force/Drag_elevator">
			<description>Drag due to elevator deflection</description>
			<product>
				<property>aero/qbar-psf</property>
				<property>metrics/Sw-sqft</property>
				<abs>
					<property>fcs/elevator-pos-rad</property>
				</abs>
				<value>0.0999048</value>
			</product>
		</function>

		<function name="aero/force/Drag_rudder">
			<description>Drag due to rudder deflection</description>
			<product>
				<property>aero/qbar-psf</property>
				<property>metrics/Sw-sqft</property>
				<abs>
					<property>fcs/rudder-pos-rad</property>
				</abs>
				<value>0.0217939</value>
			</product>
		</function>

		<function name="aero/force/Drag_left_spoiler">
			<description>Delta drag due to left spoiler deflection</description>
			<product>
				<p>aero/qbar-psf</p>
				<p>metrics/Ss-sqft</p>
				<sin>
					<p>fcs/left-spoiler-pos-rad</p>
				</sin>
				<v>1.28</v>
			</product>
		</function>

		<function name="aero/force/Drag_right_spoiler">
			<description>Delta drag due to right spoiler deflection</description>
			<product>
				<p>aero/qbar-psf</p>
				<p>metrics/Ss-sqft</p>
				<sin>
					<p>fcs/right-spoiler-pos-rad</p>
				</sin>
				<v>1.28</v>
			</product>
		</function>

		<function name="aero/force/Drag_gear">
			<description>Drag due to gear</description>
			<product>
				<property>aero/qbar-psf</property>
				<property>metrics/Sw-sqft</property>
				<property>gear/gear-pos-norm</property>
				<value>0.023</value>
			</product>
		</function>
	</axis>

	<axis name="SIDE">
		<function name="aero/force/Side_beta">
			<description>Side force due to beta</description>
			<product>
				<property>aero/qbar-psf</property>
				<property>metrics/Sw-sqft</property>
				<table>
					<independentVar lookup="row">aero/alpha-deg</independentVar>
					<independentVar lookup="column">aero/beta-deg</independentVar>
					<independentVar lookup="table">fcs/flap-pos-deg</independentVar>
					<tableData breakPoint="0">
								-30.0		-15.0		0.0			15.0		30.0
						-10.0	0.162560	0.107318	0			-0.107318	-0.162560
						-5.0		0.171248	0.113225	0			-0.113225	-0.171248
						0.0		0.169606	0.108275	0			-0.108275	-0.169606
						5.0		0.160555	0.096401	0			-0.096401	-0.160555
						10.0	0.143190	0.078486	0			-0.078486	-0.143190
						15.0	0.119761	0.067668	0			-0.067668	-0.119761
						20.0	0.112015	0.070737	0			-0.070737	-0.112015
					</tableData>
					<tableData breakPoint="38">
								-30.0		-15.0		0.0			15.0		30.0
						-10.0	0.132283	0.098066	0.000105	-0.098066	-0.132283
						-5.0		0.131345	0.093167	0.000050	-0.093167	-0.131345
						0.0		0.102523	0.080670	-0.000029	-0.080670	-0.102523
						5.0		0.095732	0.066907	-0.000219	-0.066907	-0.095732
						10.0	0.099112	0.057909	-0.000707	-0.057909	-0.099112
						15.0	0.087168	0.061240	-0.001235	-0.061240	-0.087168
						20.0	0.107269	0.073062	-0.000971	-0.073062	-0.107269
					</tableData>
				</table>
			</product>
		</function>

		<function name="aero/force/Side_roll_rate">
			<description>Side force due to roll rate</description>
			<product>
				<property>aero/qbar-psf</property>
				<property>metrics/Sw-sqft</property>
				<property>aero/bi2vel</property>
				<property>velocities/p-aero-rad_sec</property>
				<table>
					<independentVar lookup="row">aero/alpha-deg</independentVar>
					<independentVar lookup="column">aero/beta-deg</independentVar>
					<independentVar lookup="table">fcs/flap-pos-deg</independentVar>
					<tableData breakPoint="0">
								-30.0		-15.0		0.0			15.0		30.0
						-10.0	-0.288851	-0.370058	-0.373194	-0.370058	-0.288851
						-5.0		-0.276208	-0.358863	-0.406308	-0.358863	-0.276208
						0.0		-0.271589	-0.332168	-0.355441	-0.332168	-0.271589
						5.0		-0.188646	-0.244877	-0.249986	-0.244877	-0.188646
						10.0	-0.126356	-0.100113	-0.086704	-0.100113	-0.126356
						15.0	-0.056945	0.037554	0.083213	0.037554	-0.056945
						20.0	0.035421	0.126342	0.246191	0.126342	0.035421
					</tableData>
					<tableData breakPoint="38">
								-30.0		-15.0		0.0			15.0		30.0
						-10.0	-0.199389	-0.287653	-0.314478	-0.287653	-0.199389
						-5.0		-0.192932	-0.255534	-0.282899	-0.255534	-0.192932
						0.0		-0.141498	-0.159949	-0.161648	-0.159949	-0.141498
						5.0		0.040718	0.032321	-0.004357	-0.032321	-0.040718
						10.0	0.098854	0.122864	0.187470	0.122864	-0.098854
						15.0	0.075799	0.248836	0.344787	0.248836	0.075799
						20.0	0.174922	0.284470	0.300717	0.284470	0.174922
					</tableData>
				</table>
			</product>
		</function>

		<function name="aero/force/Side_yaw_rate">
			<description>Side force due to yaw rate</description>
			<product>
				<property>aero/qbar-psf</property>
				<property>metrics/Sw-sqft</property>
				<property>aero/bi2vel</property>
				<property>velocities/r-aero-rad_sec</property>
				<table>
					<independentVar lookup="row">aero/alpha-deg</independentVar>
					<independentVar lookup="column">aero/beta-deg</independentVar>
					<independentVar lookup="table">fcs/flap-pos-deg</independentVar>
					<tableData breakPoint="0">
								-30.0		-15.0		0.0			15.0		30.0
						-10.0	0.158086	0.274601	0.280920	0.274601	0.158086
						-5.0		0.187028	0.298929	0.314042	0.298929	0.187028
						0.0		0.192801	0.318084	0.348586	0.318084	0.192801
						5.0		0.187516	0.355482	0.382104	0.355482	0.187516
						10.0	0.256990	0.351803	0.377698	0.351803	0.256990
						15.0	0.289076	0.404717	0.407896	0.404717	0.289076
						20.0	0.313626	0.413873	0.427802	0.413873	0.313626
					</tableData>
					<tableData breakPoint="38">
								-30.0		-15.0		0.0			15.0		30.0
						-10.0	0.177460	0.317035	0.350050	0.317035	0.177460
						-5.0		0.210292	0.343579	0.382084	0.343579	0.210292
						0.0		0.221138	0.363712	0.407076	0.363712	0.221138
						5.0		0.272337	0.374226	0.420681	0.374226	0.272337
						10.0	0.292395	0.400371	0.411916	0.400371	0.292395
						15.0	0.330792	0.418145	0.411545	0.418145	0.330792
						20.0	0.272444	0.352984	0.368726	0.352984	0.272444
					</tableData>
				</table>
			</product>
		</function>

		<function name="aero/force/Side_aileron">
			<description>Side force due to rudder</description>
			<product>
				<property>aero/qbar-psf</property>
				<property>metrics/Sw-sqft</property>
				<property>fcs/aileron-pos-rad</property>
				<value>0.0843341</value>
			</product>
		</function>

		<function name="aero/force/Side_rudder">
			<description>Side force due to rudder</description>
			<product>
				<property>aero/qbar-psf</property>
				<property>metrics/Sw-sqft</property>
				<property>fcs/rudder-pos-rad</property>
				<value>0.1009441</value>
			</product>
		</function>
	</axis>

	<axis name="PITCH">
		<!--<function name="aero/moment/Pitch_propwash">
			<description>Pitch moment due to propeller induced velocity</description>
			<product>
				<property>propulsion/engine[0]/thrust-coefficient</property>
				<property>aero/qbar-psf</property>
				<property>metrics/Sw-sqft</property>
				<property>metrics/bw-ft</property>
				<table>
					<independentVar lookup="row">aero/alpha-rad</independentVar>
					<independentVar lookup="column">fcs/flap-pos-deg</independentVar>
					<tableData>
								0		60
						-0.01	0		0
						0		0.266	0.71
						0.13	1.455	3.880
						0.17	0		0
					</tableData>
				</table>
			</product>
		</function>-->

		<function name="aero/moment/Pitch_alpha">
			<description>Pitch moment due to alpha</description>
			<product>
				<property>aero/qbar-psf</property>
				<property>metrics/Sw-sqft</property>
				<property>metrics/cbarw-ft</property>
				<table>
					<independentVar lookup="row">aero/alpha-deg</independentVar>
					<independentVar lookup="column">aero/beta-deg</independentVar>
					<independentVar lookup="table">fcs/flap-pos-deg</independentVar>
					<tableData breakPoint="0">
								-30.0		-15.0		0.0			15.0		30.0
						-10.0	0.267082	0.171902	0.297580	0.171902	0.267082
						-5.0		0.106120	-0.038866	0.081041	-0.038866	0.106120
						0.0		-0.025184	-0.233274	-0.124779	-0.233274	-0.025184
						5.0		-0.345250	-0.414888	-0.315670	-0.414888	-0.345250
						10.0	-0.368268	-0.585322	-0.477267	-0.585322	-0.368268
						15.0	-0.481702	-0.729657	-0.621424	-0.729657	-0.481702
						20.0	-0.749811	-0.708568	-0.747379	-0.708568	-0.749811
					</tableData>
					<tableData breakPoint="38">
								-30.0		-15.0		0.0			15.0		30.0
						-10.0	0.268588	0.154987	0.304669	0.154987	0.268588
						-5.0		0.106371	-0.008159	0.119370	-0.008159	0.106371
						0.0		0.049346	-0.169897	-0.065504	-0.169897	0.049346
						5.0		-0.245232	-0.276477	-0.205564	-0.276477	-0.245232
						10.0	-0.247282	-0.392329	-0.304008	-0.392329	-0.247282
						15.0	-0.354610	-0.423082	-0.408434	-0.423082	-0.354610
						20.0	-0.510693	-0.579760	-0.486838	-0.579760	-0.510693
					</tableData>
				</table>
			</product>
		</function>

		<function name="aero/moment/Pitch_elevator">
			<description>Pitch moment due to elevator</description>
			<product>
				<property>aero/qbar-psf</property>
				<property>metrics/Sw-sqft</property>
				<property>metrics/cbarw-ft</property>
				<property>fcs/elevator-pos-rad</property>
				<v>-1.045867</v>
			</product>
		</function>

		<function name="aero/moment/Pitch_damp">
			<description>Pitch moment due to pitch rate</description>
			<product>
				<property>aero/qbar-psf</property>
				<property>metrics/Sw-sqft</property>
				<property>metrics/cbarw-ft</property>
				<property>aero/ci2vel</property>
				<property>velocities/q-aero-rad_sec</property>
				<table>
					<independentVar lookup="row">aero/alpha-deg</independentVar>
					<independentVar lookup="column">aero/beta-deg</independentVar>
					<independentVar lookup="table">fcs/flap-pos-deg</independentVar>
					<tableData breakPoint="0">
								-30.0		-15.0		0.0			15.0		30.0
						-10.0	-29.110327	-29.904646	-30.360458	-29.904646	-29.110327
						-5.0		-28.689220	-30.244215	-30.867723	-30.244215	-28.689220
						0.0		-30.488729	-31.189908	-31.507249	-31.189908	-30.488729
						5.0		-27.083375	-29.689789	-32.335353	-29.689789	-27.083375
						10.0	-31.076104	-23.530157	-24.512455	-23.530157	-31.076104
						15.0	-20.369889	-9.160193	-12.531522	-9.160193	-20.369889
					</tableData>
					<tableData breakPoint="38">
								-30.0		-15.0		0.0			15.0		30.0
						-10.0	-27.799994	-28.011773	-29.099138	-28.011773	-27.799994
						-5.0		-27.406312	-28.747841	-30.667162	-28.747841	-27.406312
						0.0		-29.746385	-29.407245	-30.707466	-29.407245	-29.746385
						5.0		-32.201051	-29.927401	-31.082430	-29.927401	-32.201051
						10.0	-35.467838	-28.928163	-32.685249	-28.928163	-35.467838
						15.0	-29.874988	-22.755712	-21.130551	-22.755712	-29.874988
						20.0	-19.809506	-10.101916	-11.908935	-10.101916	-19.809506
					</tableData>
				</table>
			</product>
		</function>

		<function name="aero/moment/Pitch_alphadot">
			<description>Pitch moment due to alpha rate</description>
			<product>
				<property>aero/qbar-psf</property>
				<property>metrics/Sw-sqft</property>
				<property>metrics/cbarw-ft</property>
				<property>aero/ci2vel</property>
				<property>aero/alphadot-rad_sec</property>
				<value>-8</value>
			</product>
		</function>
	</axis>

	<axis name="ROLL">
		<!--<function name="aero/moment/Roll_differential_propwash">
			<description>Roll moment due to differential propwash</description>
			<product>
				<property>propulsion/engine[0]/thrust-coefficient</property>
				<property>aero/qbar-psf</property>
				<property>metrics/Sw-sqft</property>
				<property>metrics/bw-ft</property>
				<property>aero/alpha-rad</property>
				<value>-12.7674</value>
			</product>
		</function>-->

		<function name="aero/moment/Roll_beta">
			<description>Roll moment due to beta</description>
			<product>
				<property>aero/qbar-psf</property>
				<property>metrics/Sw-sqft</property>
				<property>metrics/bw-ft</property>
				<table>
					<independentVar lookup="row">aero/alpha-deg</independentVar>
					<independentVar lookup="column">aero/beta-deg</independentVar>
					<independentVar lookup="table">fcs/flap-pos-deg</independentVar>
					<tableData breakPoint="0">
								-30.0		-15.0		0.0			15.0		30.0
						-10.0	-0.058120	-0.034717	0			0.034717	0.058120
						-5.0		-0.060989	-0.037979	0			0.037979	0.060989
						0.0		-0.063859	-0.040407	0			0.040407	0.063859
						5.0		-0.066019	-0.041573	0			0.041573	0.066019
						10.0	-0.068182	-0.025087	0			0.025087	0.068182
						15.0	-0.040749	-0.021676	0			0.021676	0.040749
						20.0	-0.039170	-0.014412	0			0.014412	0.039170
					</tableData>
					<tableData breakPoint="38">
								-30.0		-15.0		0.0			15.0		30.0
						-10.0	-0.047977	-0.030087	0			0.030087	0.047977
						-5.0		-0.051485	-0.032029	0			0.032029	0.051485
						0.0		-0.051023	-0.031881	0			0.031881	0.051023
						5.0		-0.046565	-0.028214	0			0.028214	0.046565
						10.0	-0.040978	-0.019621	0			0.019621	0.040978
						15.0	-0.038816	-0.019199	0			0.019199	0.038816
						20.0	-0.039555	-0.017173	0			0.017173	0.039555
					</tableData>
				</table>
				<value>-1</value>
			</product>
		</function>

		<function name="aero/moment/Roll_differential_lift">
			<description>>Roll moment due to differential lift</description>
			<difference>
				<product>
					<sum>
						<p>aero/force/Lift_alpha_left_wing</p>
						<p>aero/force/Lift_alpha_rate_left_wing</p>
						<p>aero/force/Lift_pitch_rate_left_wing</p>
					</sum>
					<p>metrics/bw-ft</p>
					<v>0.25</v>
				</product>
				<product>
					<sum>
						<p>aero/force/Lift_alpha_right_wing</p>
						<p>aero/force/Lift_alpha_rate_right_wing</p>
						<p>aero/force/Lift_pitch_rate_right_wing</p>
					</sum>
					<p>metrics/bw-ft</p>
					<v>0.25</v>
				</product>
			</difference>
		</function>

		<function name="aero/moment/Roll_left_spoiler">
			<description>Roll moment due to left spoiler</description>
			<product>
				<p>aero/force/Lift_left_spoiler</p>
				<p>metrics/spoiler-arm-ft</p>
				<v>-1</v>
			</product>
		</function>

		<function name="aero/moment/Roll_right_spoiler">
			<description>Roll moment due to right spoiler</description>
			<product>
				<p>aero/force/Lift_right_spoiler</p>
				<p>metrics/spoiler-arm-ft</p>
			</product>
		</function>

		<function name="aero/moment/Roll_damp">
			<description>Roll moment due to roll rate</description>
			<product>
				<property>aero/qbar-psf</property>
				<property>metrics/Sw-sqft</property>
				<property>metrics/bw-ft</property>
				<property>aero/bi2vel</property>
				<property>velocities/p-aero-rad_sec</property>
				<table>
					<independentVar lookup="row">aero/alpha-deg</independentVar>
					<independentVar lookup="column">aero/beta-deg</independentVar>
					<independentVar lookup="table">fcs/flap-pos-deg</independentVar>
					<tableData breakPoint="0">
								-30.0		-15.0		0.0			15.0		30.0
						-10.0	0.463550	0.534855	0.549921	0.534855	0.463550
						-5.0		0.460976	0.541142	0.571505	0.541142	0.460976
						0.0		0.456675	0.541212	0.580125	0.541212	0.456675
						5.0		0.403565	0.439312	0.460981	0.439312	0.403565
						10.0	0.272426	0.228721	0.229240	0.228721	0.272426
						15.0	0.095906	-0.029106	-0.063914	-0.029106	0.095906
						20.0	-0.065866	-0.249396	-0.343341	-0.249396	-0.065866
					</tableData>
					<tableData breakPoint="38">
								-30.0		-15.0		0.0			15.0		30.0
						-10.0	0.438996	0.513528	0.537710	0.513528	0.438996
						-5.0		0.423345	0.494201	0.524668	0.494201	0.423345
						0.0		0.348944	0.374027	0.397307	0.374027	0.348944
						5.0		0.226602	0.169933	0.159375	0.169933	0.226602
						10.0	0.070951	-0.106688	-0.173546	-0.106688	0.070951
						15.0	-0.123580	-0.381180	-0.487097	-0.381180	-0.123580
						20.0	-0.279894	-0.438509	-0.364487	-0.438509	-0.279894
					</tableData>
				</table>
				<value>-1</value>
			</product>
		</function>

		<function name="aero/moment/Roll_yaw">
			<description>Roll moment due to yaw rate</description>
			<product>
				<property>aero/qbar-psf</property>
				<property>metrics/Sw-sqft</property>
				<property>metrics/bw-ft</property>
				<property>aero/bi2vel</property>
				<property>velocities/r-aero-rad_sec</property>
				<table>
					<independentVar lookup="row">aero/alpha-deg</independentVar>
					<independentVar lookup="column">aero/beta-deg</independentVar>
					<independentVar lookup="table">fcs/flap-pos-deg</independentVar>
					<tableData breakPoint="0">
								-30.0		-15.0		0.0			15.0		30.0
						-10.0	-0.004585	-0.034742	-0.038382	-0.039619	-0.024074
						-5.0		-0.054320	-0.090197	-0.097587	-0.094499	-0.070017
						0.0		-0.104983	-0.143914	-0.157143	-0.146518	-0.117913
						5.0		-0.131912	-0.202007	-0.215631	-0.200437	-0.169791
						10.0	-0.113389	-0.219374	-0.180293	-0.101714	-0.214230
						15.0	-0.198885	-0.230881	-0.245272	-0.243435	-0.088005
						20.0	-0.139174	-0.254188	-0.273219	-0.247448	-0.199029
					</tableData>
					<tableData breakPoint="38">
								-30.0		-15.0		0.0			15.0		30.0
						-10.0	-0.151282	-0.190090	-0.198358	-0.190090	-0.151282
						-5.0		-0.199625	-0.243075	-0.256668	-0.243075	-0.199625
						0.0		-0.226707	-0.279447	-0.299588	-0.279447	-0.226707
						5.0		-0.247898	-0.288941	-0.306299	-0.288941	-0.247898
						10.0	-0.247577	-0.278437	-0.304224	-0.278437	-0.247577
						15.0	-0.229605	-0.267903	-0.297779	-0.267903	-0.229605
						20.0	-0.155190	-0.195626	-0.174829	-0.195626	-0.155190
					</tableData>
				</table>
				<value>-1</value>
			</product>
		</function>

		<function name="aero/moment/Roll_aileron">
			<description>Roll moment due to aileron</description>
			<product>
				<property>aero/qbar-psf</property>
				<property>metrics/Sw-sqft</property>
				<property>metrics/bw-ft</property>
				<property>fcs/aileron-pos-rad</property>
				<value>0.1</value>
			</product>
		</function>

		<function name="aero/moment/Roll_rudder">
			<description>Roll moment due to rudder</description>
			<product>
				<property>aero/qbar-psf</property>
				<property>metrics/Sw-sqft</property>
				<property>metrics/bw-ft</property>
				<property>fcs/rudder-pos-rad</property>
				<value>0.0130385</value>
			</product>
		</function>
	</axis>

	<axis name="YAW">
		<!-- Stall initiator -->
		<!--<function name="aero/moment/Yaw_alpha">
			<description>Yaw moment due to alpha</description>
			<product>
				<property>aero/qbar-psf</property>
				<property>metrics/Sw-sqft</property>
				<property>metrics/bw-ft</property>
				<property>aero/alpha-rad</property>
				<property>fcs/gear-no-wow</property>
				<table>
					<independentVar lookup="row">aero/beta-rad</independentVar>
					<independentVar lookup="column">aero/Re</independentVar>
					<tableData>
								5872265	6459492
						-0.3491	-1			0
						0.3491	1			0
					</tableData>
				</table>
			</product>
		</function>-->

		<function name="aero/moment/Yaw_beta">
			<description>Yaw moment due to beta</description>
			<product>
				<property>aero/qbar-psf</property>
				<property>metrics/Sw-sqft</property>
				<property>metrics/bw-ft</property>
				<table>
					<independentVar lookup="row">aero/alpha-deg</independentVar>
					<independentVar lookup="column">aero/beta-deg</independentVar>
					<independentVar lookup="table">fcs/flap-pos-deg</independentVar>
					<tableData breakPoint="0">
								-30.0		-15.0		0.0			15.0		30.0
						-10.0	0.023531	0.020058	0			-0.020058	-0.023531
						-5.0		0.017989	0.015611	0			-0.015611	-0.017989
						0.0		0.013516	0.010804	0			-0.010804	-0.013516
						5.0		0.011823	0.006391	0			-0.006391	-0.011823
						10.0	0.011788	0.008725	0			-0.008725	-0.011788
						15.0	0.011573	0.006831	0			-0.006831	-0.011573
						20.0	0.013982	0.016406	0			-0.016406	-0.013982
					</tableData>
					<tableData breakPoint="38">
								-30.0		-15.0		0.0			15.0		30.0
						-10.0	0.012843	0.017878	0			-0.017878	-0.012843
						-5.0		0.011990	0.014347	0			-0.014347	-0.011990
						0.0		0.012121	0.010492	0			-0.010492	-0.012121
						5.0		0.012379	0.008546	0			-0.008546	-0.012379
						10.0	0.011573	0.009536	0			-0.009536	-0.011573
						15.0	0.011585	0.010552	0			-0.010552	-0.011585
						20.0	0.018449	0.010471	0			-0.010471	-0.018449
					</tableData>
				</table>
				<value>-1</value>
			</product>
		</function>

		<function name="aero/moment/Yaw_roll_rate">
			<description>Yaw moment due to roll rate</description>
			<product>
				<property>aero/qbar-psf</property>
				<property>metrics/Sw-sqft</property>
				<property>metrics/bw-ft</property>
				<property>aero/bi2vel</property>
				<property>velocities/p-rad_sec</property>
				<table>
					<independentVar lookup="row">aero/alpha-deg</independentVar>
					<independentVar lookup="column">aero/beta-deg</independentVar>
					<independentVar lookup="table">fcs/flap-pos-deg</independentVar>
					<tableData breakPoint="0">
								-30.0		-15.0		0.0			15.0		30.0
						-10.0	-0.117772	-0.157050	-0.160722	-0.157050	-0.117772
						-5.0		-0.052193	-0.082450	-0.085433	-0.082450	-0.052193
						0.0		-0.036474	-0.010473	0.001755	-0.010473	0.036474
						5.0		0.035365	0.054149	0.072719	0.054149	0.035365
						10.0	0.086278	0.092051	0.102706	0.092051	0.086278
						15.0	0.085449	0.080076	0.072843	0.080076	0.085449
						20.0	0.061662	0.025318	-0.014260	0.025318	0.061662
					</tableData>
					<tableData breakPoint="38">
								-30.0		-15.0		0.0		15.0		30.0
						-10.0	-0.057642	-0.084619	-0.085429	-0.084619	-0.057642
						-5.0		0.003436	-0.007795	-0.001860	-0.007795	0.003436
						0.0		0.065654	0.059938	0.077874	0.059938	0.065654
						5.0		0.120426	0.100699	0.117989	0.100699	0.120426
						10.0	0.108902	0.094557	0.096117	0.094557	0.108902
						15.0	0.069321	0.018208	0.007628	0.018208	0.069321
						20.0	0.014703	-0.038448	-0.030214	-0.038448	0.014703
					</tableData>
				</table>
				<value>-1</value>
			</product>
		</function>

		<function name="aero/moment/Yaw_damp">
			<description>Yaw moment due to yaw rate</description>
			<product>
				<property>aero/qbar-psf</property>
				<property>metrics/Sw-sqft</property>
				<property>metrics/bw-ft</property>
				<property>aero/bi2vel</property>
				<property>velocities/r-aero-rad_sec</property>
				<table>
					<independentVar lookup="row">aero/alpha-deg</independentVar>
					<independentVar lookup="column">aero/beta-deg</independentVar>
					<independentVar lookup="table">fcs/flap-pos-deg</independentVar>
					<tableData breakPoint="0">
								-30.0		-15.0		0.0			15.0		30.0
						-10.0	0.051901	0.113597	0.123073	0.113597	0.051901
						-5.0		0.062455	0.112817	0.118177	0.112817	0.062455
						0.0		0.054978	0.110690	0.115047	0.110690	0.054978
						5.0		0.059719	0.113763	0.112421	0.113763	0.059719
						10.0	0.068148	0.125148	0.121268	0.125148	0.068148
						15.0	0.098571	0.119640	0.111373	0.119640	0.098571
						20.0	0.091811	0.107372	0.092950	0.107372	0.091811
					</tableData>
					<tableData breakPoint="38">
								-30.0		-15.0		0.0			15.0		30.0
						-10.0	0.062364	0.134748	0.152942	0.134748	0.062364
						-5.0		0.067293	0.131089	0.144958	0.131089	0.067293
						0.0		0.062247	0.124354	0.135813	0.124354	0.062247
						5.0		0.088766	0.119609	0.132729	0.119609	0.088766
						10.0	0.078694	0.118923	0.120319	0.118923	0.078694
						15.0	0.086616	0.099117	0.099114	0.099117	0.086616
						20.0	0.043853	0.088593	0.093719	0.088593	0.043853
					</tableData>
				</table>
				<value>-1</value>
			</product>
		</function>

		<function name="aero/moment/Yaw_left_spoiler">
			<description>Yaw moment due to left spoiler</description>
			<product>
				<p>aero/force/Drag_left_spoiler</p>
				<p>metrics/spoiler-arm-ft</p>
				<v>-1</v>
			</product>
		</function>

		<function name="aero/moment/Yaw_right_spoiler">
			<description>Yaw moment due to right spoiler</description>
			<product>
				<p>aero/force/Drag_right_spoiler</p>
				<p>metrics/spoiler-arm-ft</p>
			</product>
		</function>

		<function name="aero/moment/Yaw_rudder">
			<description>Yaw moment due to rudder</description>
			<product>
				<property>aero/qbar-psf</property>
				<property>metrics/Sw-sqft</property>
				<property>metrics/bw-ft</property>
				<property>fcs/rudder-pos-rad</property>
				<value>-0.0448667</value>
			</product>
		</function>

		<function name="aero/moment/Yaw_aileron">
			<description>Adverse yaw</description>
			<product>
				<property>aero/qbar-psf</property>
				<property>metrics/Sw-sqft</property>
				<property>metrics/bw-ft</property>
				<property>fcs/aileron-pos-rad</property>
				<value>-0.003</value>
			</product>
		</function>
	</axis>
</aerodynamics>
