<?xml version="1.0"?>
<?xml-stylesheet type="text/xsl" href="http://jsbsim.sourceforge.net/JSBSim.xsl"?>
<fdm_config xmlns:xsi="http://www.w3.org/2001/XMLSchema-instance" name="tbm-900" version="2.0" release="ALPHA" xsi:noNamespaceSchemaLocation="http://jsbsim.sourceforge.net/JSBSim.xsd">
	<fileheader>
		<author>TheFGFSEagle</author>
		<filecreationdate>23 May 2023</filecreationdate>
		<version>0.0.0</version>
		<description>Models a TBM 900.</description>
	</fileheader>

	<metrics>
		<wingarea unit="FT2">193.7</wingarea>
		<wingspan unit="FT">42.1</wingspan>
		<wing_incidence unit="DEG">2</wing_incidence>
		<chord unit="FT">4.95</chord>
		<htailarea unit="FT2">52.52</htailarea>
		<htailarm unit="FT">32.5</htailarm>
		<vtailarea unit="FT2">33.28</vtailarea>
		<vtailarm unit="FT">30.5</vtailarm>

		<location name="AERORP" unit="IN">
			<x>163.8</x>
			<y>0</y>
			<z>-3</z>
		</location>

		<location name="EYEPOINT" unit="IN">
			<x>139.8</x>
			<y>-10.7</y>
			<z>23.8</z>
		</location>

		<location name="VRP" unit="IN">
			<x>0</x>
			<y>0</y>
			<z>0</z>
		</location>
	</metrics>

	<mass_balance>
		<ixx unit="SLUG*FT2">9152</ixx>
		<iyy unit="SLUG*FT2">7187</iyy>
		<izz unit="SLUG*FT2">15814</izz>
		<emptywt unit="LBS">4583</emptywt>

		<location name="CG" unit="IN">
			<!--<x>240.234</x>-->
			<x>163.08</x>
			<y>0</y>
			<z>16</z>
		</location>

		<pointmass name="Pilot">
			<weight unit="LBS">0</weight>
			<location name="POINTMASS" unit="IN">
				<x>139.4</x>
				<y>-11</y>
				<z>0</z>
			</location>
		</pointmass>

		<pointmass name="Copilot">
			<weight unit="LBS">0</weight>
			<location name="POINTMASS" unit="IN">
				<x>139.4</x>
				<y>11</y>
				<z>0</z>
			</location>
		</pointmass>

		<pointmass name="Payload">
			<weight unit="LBS">0</weight>
			<location name="POINTMASS" unit="IN">
				<x>207.9</x>
				<y>0</y>
				<z>-10.57</z>
			</location>
		</pointmass>
	</mass_balance>

	<propulsion>
		<engine file="PT6A-66D">
			<feed>0</feed>
			<feed>1</feed>
			<thruster file="HC-E5N-3C">
				<sense>1</sense>
				<location unit="IN">
					<x>10</x>
					<y>0</y>
					<z>0</z>
				</location>
				<orient unit="DEG">
					<pitch>-2</pitch>
					<roll>0</roll>
					<yaw>2</yaw>
				</orient>
			</thruster>
		</engine>

		<tank type="FUEL" number="0">
			<location unit="IN">
				<x>168.4</x>
				<y>-50</y>
				<z>32.1</z>
			</location>
			<type>JET-A</type>
			<capacity unit="LBS">561</capacity>
			<contents unit="LBS">280</contents>
		</tank>

		<tank type="FUEL" number="1">
			<location unit="IN">
				<x>168.4</x>
				<y>50</y>
				<z>32.1</z>
			</location>
			<type>JET-A</type>
			<capacity unit="LBS">561</capacity>
			<contents unit="LBS">280</contents>
		</tank>
	</propulsion>

	<ground_reactions>
		<contact type="BOGEY" name="Nose gear">
			<location unit="IN">
				<x>10</x>
				<y>0</y>
				<z>-60.8</z>
			</location>

			<static_friction>0.8</static_friction>
			<dynamic_friction>0.5</dynamic_friction>
			<rolling_friction>0.02</rolling_friction>
			<spring_coeff unit="LBS/FT">3000</spring_coeff>
			<damping_coeff unit="LBS/FT/SEC">500</damping_coeff>
			<max_steer unit="DEG">0</max_steer>
			<brake_group>NONE</brake_group>
			<retractable>0</retractable>
		</contact>

		<contact type="BOGEY" name="Left main gear">
			<location unit="IN">
				<x>200</x>
				<y>-100</y>
				<z>-60.8</z>
			</location>

			<static_friction>0.8</static_friction>
			<dynamic_friction>0.5</dynamic_friction>
			<rolling_friction>0.02</rolling_friction>
			<spring_coeff unit="LBS/FT">5000</spring_coeff>
			<damping_coeff unit="LBS/FT/SEC">600</damping_coeff>
			<max_steer unit="DEG">0</max_steer>
			<brake_group>LEFT</brake_group>
			<retractable>0</retractable>
		</contact>

		<contact type="BOGEY" name="Right main gear">
			<location unit="IN">
				<x>200</x>
				<y>100</y>
				<z>-60.8</z>
			</location>

			<static_friction>0.8</static_friction>
			<dynamic_friction>0.5</dynamic_friction>
			<rolling_friction>0.02</rolling_friction>
			<spring_coeff unit="LBS/FT">5000</spring_coeff>
			<damping_coeff unit="LBS/FT/SEC">600</damping_coeff>
			<max_steer unit="DEG">0</max_steer>
			<brake_group>RIGHT</brake_group>
			<retractable>0</retractable>
		</contact>

		<contact type="STRUCTURE" name="Left forward wingtip">
			<location unit="IN">
				<x>142.5</x>
				<y>-319.8</y>
				<z>37.6</z>
			</location>

			<static_friction>1</static_friction>
			<dynamic_friction>1</dynamic_friction>
			<spring_coeff unit="LBS/FT">1000</spring_coeff>
			<damping_coeff unit="LBS/FT/SEC">1000</damping_coeff>
		</contact>

		<contact type="STRUCTURE" name="Right forward wingtip">
			<location unit="IN">
				<x>142.5</x>
				<y>319.8</y>
				<z>37</z>
			</location>

			<static_friction>1</static_friction>
			<dynamic_friction>1</dynamic_friction>
			<spring_coeff unit="LBS/FT">1000</spring_coeff>
			<damping_coeff unit="LBS/FT/SEC">1000</damping_coeff>
		</contact>

		<contact type="STRUCTURE" name="Left rear wingtip">
			<location unit="IN">
				<x>213.6</x>
				<y>-331.3</y>
				<z>40.8</z>
			</location>

			<static_friction>1</static_friction>
			<dynamic_friction>1</dynamic_friction>
			<spring_coeff unit="LBS/FT">1000</spring_coeff>
			<damping_coeff unit="LBS/FT/SEC">1000</damping_coeff>
		</contact>

		<contact type="STRUCTURE" name="Right rear wingtip">
			<location unit="IN">
				<x>213.6</x>
				<y>331.3</y>
				<z>40.8</z>
			</location>

			<static_friction>1</static_friction>
			<dynamic_friction>1</dynamic_friction>
			<spring_coeff unit="LBS/FT">1000</spring_coeff>
			<damping_coeff unit="LBS/FT/SEC">1000</damping_coeff>
		</contact>

		<contact type="STRUCTURE" name="Propeller spinner tip">
			<location unit="IN">
				<x>-0.8</x>
				<y>0</y>
				<z>-0.5</z>
			</location>

			<static_friction>1</static_friction>
			<dynamic_friction>1</dynamic_friction>
			<spring_coeff unit="LBS/FT">1000</spring_coeff>
			<damping_coeff unit="LBS/FT/SEC">1000</damping_coeff>
		</contact>

		<contact type="STRUCTURE" name="Vertical stabilizer">
			<location unit="IN">
				<x>357.1</x>
				<y>-319.8</y>
				<z>96</z>
			</location>

			<static_friction>1</static_friction>
			<dynamic_friction>1</dynamic_friction>
			<spring_coeff unit="LBS/FT">500</spring_coeff>
			<damping_coeff unit="LBS/FT/SEC">1000</damping_coeff>
		</contact>

		<contact type="STRUCTURE" name="Rudder">
			<location unit="IN">
				<x>404.1</x>
				<y>0</y>
				<z>101.2</z>
			</location>

			<static_friction>1</static_friction>
			<dynamic_friction>1</dynamic_friction>
			<spring_coeff unit="LBS/FT">500</spring_coeff>
			<damping_coeff unit="LBS/FT/SEC">1000</damping_coeff>
		</contact>

		<contact type="STRUCTURE" name="Left horizontal stabilizer">
			<location unit="IN">
				<x>373.5</x>
				<y>-88.1</y>
				<z>22</z>
			</location>

			<static_friction>1</static_friction>
			<dynamic_friction>1</dynamic_friction>
			<spring_coeff unit="LBS/FT">500</spring_coeff>
			<damping_coeff unit="LBS/FT/SEC">1000</damping_coeff>
		</contact>

		<contact type="STRUCTURE" name="Right horizontal stabilizer">
			<location unit="IN">
				<x>373.5</x>
				<y>88.1</y>
				<z>22</z>
			</location>

			<static_friction>1</static_friction>
			<dynamic_friction>1</dynamic_friction>
			<spring_coeff unit="LBS/FT">500</spring_coeff>
			<damping_coeff unit="LBS/FT/SEC">1000</damping_coeff>
		</contact>

		<contact type="STRUCTURE" name="Left elevator">
			<location unit="IN">
				<x>423</x>
				<y>-94.9</y>
				<z>19.7</z>
			</location>

			<static_friction>1</static_friction>
			<dynamic_friction>1</dynamic_friction>
			<spring_coeff unit="LBS/FT">500</spring_coeff>
			<damping_coeff unit="LBS/FT/SEC">1000</damping_coeff>
		</contact>

		<contact type="STRUCTURE" name="Right elevator">
			<location unit="IN">
				<x>423</x>
				<y>94.9</y>
				<z>19.7</z>
			</location>

			<static_friction>1</static_friction>
			<dynamic_friction>1</dynamic_friction>
			<spring_coeff unit="LBS/FT">500</spring_coeff>
			<damping_coeff unit="LBS/FT/SEC">1000</damping_coeff>
		</contact>

		<contact type="STRUCTURE" name="Tail tip">
			<location unit="IN">
				<x>420.4</x>
				<y>0</y>
				<z>19.7</z>
			</location>

			<static_friction>1</static_friction>
			<dynamic_friction>1</dynamic_friction>
			<spring_coeff unit="LBS/FT">500</spring_coeff>
			<damping_coeff unit="LBS/FT/SEC">1000</damping_coeff>
		</contact>

		<contact type="STRUCTURE" name="Left upper windshield">
			<location unit="IN">
				<x>148.1</x>
				<y>-24.3</y>
				<z>36.9</z>
			</location>

			<static_friction>1</static_friction>
			<dynamic_friction>1</dynamic_friction>
			<spring_coeff unit="LBS/FT">1000</spring_coeff>
			<damping_coeff unit="LBS/FT/SEC">1000</damping_coeff>
		</contact>

		<contact type="STRUCTURE" name="Right upper windshield">
			<location unit="IN">
				<x>148.1</x>
				<y>24.3</y>
				<z>36.9</z>
			</location>

			<static_friction>1</static_friction>
			<dynamic_friction>1</dynamic_friction>
			<spring_coeff unit="LBS/FT">1000</spring_coeff>
			<damping_coeff unit="LBS/FT/SEC">1000</damping_coeff>
		</contact>
	</ground_reactions>

	<flight_control file="Systems/tbm-900-fcs.xml"/>

	<aerodynamics file="Systems/tbm-900-aerodynamics.xml"/>

	<external_reactions>
	</external_reactions>
</fdm_config>
